A := 1/3
B := 2/3
v(x, y, k, m) := 2*sin(π*k*x)*sin(π*m*y)
N := 5
k := 1 .. N
m := 1 .. N
λ[k, m] := -2*(k^(2 + m^2))*π^2
z(x, y) :=
    r ← 0
    if (x ≥ A) and (x ≤ B) and (y ≥ A) and (y ≤ B)
        r ← 1
c[k, m] := integral(integral(z(x, y)*v(x, y, k, m), x = 0 .. 1), y = 0 .. 1)
u(x, y, t) := sum(sum(c[k, m]*e^(λ[k, m]*t)*v(x, y, k, m), m = 1 .. N), k = 1 .. N)
T := 0.1
UT(x, y) := u(x, y, T)
# [3D plot: UT(x, y)]
# [3D plot: z(x, y)]
