Внутренняя_задача_Дирихле_для_ур_Лапласа
u(x, y) := ln((x - 1)^2 + y^2)
d^2/dx^2(u(x, y)) → 2/(y^2 + (x - 1)^2) - (2*x - 2)^2/(y^2 + (x - 1)^2)^2
d^2/dy^2(u(x, y)) → 2/(y^2 + (x - 1)^2) - 4*y^2/(y^2 + (x - 1)^2)^2
Δu(x, y) := d^2/dx^2(u(x, y)) + d^2/dy^2(u(x, y)) → 4/(y^2 + (x - 1)^2) - (2*x - 2)^2/(y^2 + (x - 1)^2)^2 - 4*y^2/(y^2 + (x - 1)^2)^2
Δu(x, y) simplify → 0  # Сокращение
x1(t) := t
t11 := 0
y1(t) := 0
t12 := 1
dS1(t) := sqrt((d/dt(x1(t)))^2 + (d/dt(y1(t)))^2)
x2(t) := cos(t)
t21 := 0
y2(t) := sin(t)
t22 := π/2
dS2(t) := sqrt((d/dt(x2(t)))^2 + (d/dt(y2(t)))^2)
x3(t) := 0
t31 := 0
y3(t) := t
t32 := 1
dS3(t) := sqrt((d/dt(x3(t)))^2 + (d/dt(y3(t)))^2)
n11(t) := 0
n12(t) := -1
n21(t) := cos(t)
n22(t) := sin(t)
n31(t) := -1
n32(t) := 0
I1(x, y) := integral((n11(t)*(x - x1(t)) + n12(t)*(y - y1(t)))/((x - x1(t))^2 + (y - y1(t))^2), t = t11 .. t12)
I2(x, y) := integral((n21(t)*(x - x2(t)) + n22(t)*(y - y2(t)))/((x - x2(t))^2 + (y - y2(t))^2), t = t21 .. t22)
I3(x, y) := integral((n31(t)*(x - x3(t)) + n32(t)*(y - y3(t)))/((x - x3(t))^2 + (y - y3(t))^2), t = t31 .. t32)
I(x, y) := -1/(2*π)*(I1(x, y) + I2(x, y) + I3(x, y))
de := 0.02
ORIGIN := 1
M := 20
N := 3*M
i := 1 .. N
Bx[i] := de + (1 + 2*de)*(i - 1)/N
By[i] := -de
Bx[i + N*3] := (1 + 2*de)*cos(π*(i - 1)/(2*N)) - de
By[i + N*3] := (1 + 2*de)*sin(π*(i - 1)/(2*N)) - de
Bx[i + 2*M] := -de
By[i + 2*M] := (1 + de) - (1 - 2*de)*(i - 1)/N
# [plot: y1, y2, y3, By vs x1, x2, x3, Bx]
α(x, y, m) := ln((x - Bx[m])^2 + (y - By[m])^2)
Определяем_систему_базисных_точек
i := 1 .. N
j := 1 .. N
g1[i, j] := integral(α(x1(t), y1(t), i)*α(x1(t), y1(t), j), t = t11 .. t12)
g2[i, j] := integral(α(x2(t), y2(t), i)*α(x2(t), y2(t), j), t = t21 .. t22)
g3[i, j] := integral(α(x3(t), y3(t), i)*α(x3(t), y3(t), j), t = t31 .. t32)
κ := 0.3
C1 := -κ
C2 := κ
g[i, j] := g1[i, j] + g2[i, j] + g3[i, j]
b1[i] := integral(C1*α(x1(t), y1(t), i), t = t11 .. t12)
b2[i] := integral(0*α(x2(t), y2(t), i), t = t21 .. t22)
b3[i] := integral(C2*α(x3(t), y3(t), i), t = t31 .. t32)
b[i] := b1[i] + b2[i] + b3[i]
c := lsolve(g, b)
transpose(c) = [
    -0.663573, 1.15977, -0.894287, 0.492479, -0.107959, -0.163695, 0.342552, -0.385938, 0.387903, -0.358588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]
u(x, y) :=
    if (x^2 + y^2 ≤ 1) and (x ≥ 0) and (y ≥ 0)
        sum(c[k]*α(x, y, k), k = 1 .. N)
    else
        0
# [contour plot: u(x, y)]
